x(t) :=
    (-t) if -π ≤ t < 0
    t^2/π if 0 ≤ t ≤ π
n := 5
k := 0 .. n
a[k] := 1/π*integral(x(t)*cos(k*t), t = -π .. π)
b[k] := 1/π*integral(x(t)*sin(k*t), t = -π .. π)
S(t, n) := a[0]/2 + sum(a[k]*cos(k*t) + b[k]*sin(k*t), k = 1 .. n)
a = [2.61799; -1.27324; 0.159155; -0.141471; 0.0397887; -0.0509296]
b = [0; -0.405285; 0; -0.0150105; 0; -0.00324228]
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