X(z) := 1/sqrt(2*π)*integral(exp(2*t - 1)*sin(2*t)*exp(-1i*z*t), t = 0 .. 10) simplify → -sqrt(2)*(4*z^2*e^-1 - 32*e^-1 + (16 + 16i)*e^(19 + 20i)*e^(-10i*z) + (-2 + 2i)*z^2*e^(19 + 20i)*e^(-10i*z) + z^3*e^(19 - 20i)*e^(-10i*z) - z^3*e^(19 + 20i)*e^(-10i*z) + (16 - 16i)*e^(19 - 20i)*e^(-10i*z) + (-2 - 2i)*z^2*e^(19 - 20i)*e^(-10i*z) - 16i*z*e^-1 + 8i*z*e^(19 - 20i)*e^(-10i*z) + 8i*z*e^(19 + 20i)*e^(-10i*z))/(4*sqrt(π)*z^4 + 256*sqrt(π))
X1(z) := 1/sqrt(2*π)*integral(exp(2*t - 1)*sin(2*t)*exp(-1i*z*t), t) → -sqrt(2)*((-2 + 2i)*e^(-t*z*1i - 1 + (2 + 2i)*t) - z*e^(-t*z*1i - 1 + (2 - 2i)*t)*1i + (2 + 2i)*e^(-t*z*1i - 1 + (2 - 2i)*t) + z*e^(-t*z*1i - 1 + (2 + 2i)*t)*1i)*1i/(4*sqrt(π)*(z^2 - 8 + 4i*z))  # error: Эта переменная не определена.
a(z) := |X(z)| simplify → sqrt(2)*|4*z^2*e^-1 - 32*e^-1 + (16 + 16i)*e^(19 + 20i)*e^(-10i*z) + (-2 + 2i)*z^2*e^(19 + 20i)*e^(-10i*z) + z^3*e^(19 - 20i)*e^(-10i*z) - z^3*e^(19 + 20i)*e^(-10i*z) + (16 - 16i)*e^(19 - 20i)*e^(-10i*z) + (-2 - 2i)*z^2*e^(19 - 20i)*e^(-10i*z) - 16i*z*e^-1 + 8i*z*e^(19 - 20i)*e^(-10i*z) + 8i*z*e^(19 + 20i)*e^(-10i*z)|/(4*sqrt(π)*|z^4 + 64|)
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X(z) := 1/sqrt(2*π)*integral(exp(-t/2)*sin(3*t)*exp(-1i*z*t), t = 0 .. ∞) simplify → 3*sqrt(2)/(2*sqrt(π)*(37/4 - z^2 + z*1i))
a(z) := |X(z)| → 3*sqrt(2)/(2*sqrt(π)*|37/4 - z^2 + z*1i|)
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X1(z) := 1/sqrt(2*π)*integral(exp(-1i*z*t)*t, t = 1 .. 2) simplify → sqrt(2)*e^(-z*1i)*(e^(-z*1i) - 1 - z*1i + 2i*z*e^(-z*1i))/(2*sqrt(π)*z^2)
a1(z) := |X1(z)| → sqrt(2)*e^Im(z)*|e^(-z*1i) - 1 - z*1i + 2i*z*e^(-z*1i)|/(2*sqrt(π)*|z|^2)
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