Y(s) := (X(s) + 0.5)/(s + 2) expand → X(s)/(s + 2) + 0.5/(s + 2)  # error: Эта переменная не определена.
0.5/(s + 2) invlaplace → 0.5*e^(-2*t)
τ := 10
h(t) := e^(-2*t) + 1.5*e^(-2*t) simplify → 2.5*e^(-2*t)
y1(t) := integral(2.5*e^(-2*τ)*cos(2*(t - τ)), τ = 0 .. τ) simplify → 0.62500000065*cos(2.0*t) + 0.624999998298*sin(2.0*t)
Y1(s) := 1/(s + 2)*(s/(s^2 + 4) + 1) + 0.5/(s + 2) invlaplace → (1.25 - 3.125e-21i)*e^(-2.0*t) + (0.125 - 0.125i)*cos(2.0*t) + (0.125 + 0.125i)*cos(2.0*t) + (0.125 + 0.125i)*sin(2.0*t) + (0.125 - 0.125i)*sin(2.0*t)  # error: Эта переменная не определена.
s/(s^2 + 4) + 1 invlaplace → Δ(t) + cos(2*t)
y2(t) := e^(-2*t) + integral(e^(-2*τ)*cos(2*(t - τ)), τ = 0 .. ∞) → cos(2*t)/4 + e^(-2*t) + sin(2*t)/4
1/10*integral((y2(t) - y1(t))^2, t = 0 .. 10) = 0.133985
t := 0 .. 10
0.134/(1/10*integral(y2(t)^2, t = 0 .. 10)) = 1.16416
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